OpenVSP model (file version 5), 3 components.
Geometry view with OpenVSP parameter names; values to 6 digits, angles in degrees, lengths in the model's unit.
Overall bounding box: X_Min=-0.00101135 X_Len=8.62914 Y_Min=-0.484772 Y_Len=0.969545 Z_Min=-0.28465 Z_Len=0.83965

Fuselage "FuselageGeom"
  location (X Y Z) 1.13538 0 0, rotation 0 0 0
  bounding box size 7.49275 0.3175 0.3175
  Design: Length=7.49275
  cross sections:
    n  XLocPercent  YLocPercent  ZLocPercent  shape
    0  0            0            0            circle Circle_Diameter=0.3175
    1  0.5          0            0            as above
    2  0.75         0            0            as above
    3  1            0            0            as above

Wing "Fins"
  location (X Y Z) 7.8 0 0.15, rotation 90 0 0
  3 copies around X
  bounding box size 0.7 0.969545 0.83965
  totals: TotalSpan=0.81 TotalProjectedSpan=0.81 TotalChord=0.5151 TotalArea=0.417231 TotalAR=1.57251
  root: chord 0.7, twist 0, wedge DuLow=0.1 DuUp=0.1 FlatLow=0 FlatUp=0 SymmThick=1 ThickChord=0.05 ThickLoc=0.5 ThickLocLow=0.5 UForeLow=0.25 UForeUp=0.75 ZCamber=0
  sections:
    n  Span   Root_Chord  Tip_Chord  Area      Sweep  Sweep_Location  Dihedral  Twist  Twist_Location  tip airfoil
    1  0.405  0.7         0.3302     0.208616  35     0               0         0      0.25            as above

Fuselage "Nose Cone"
  location (X Y Z) 0 0 0, rotation 0 0 0
  bounding box size 1.13639 0.3175 0.3175
  Design: Length=1.13538
  cross sections:
    n  XLocPercent  YLocPercent  ZLocPercent  shape
    0  0            0            0            circle Circle_Diameter=0.003175
    1  1            0            0            circle Circle_Diameter=0.3175

User parameters
  Design_Inputs:Core Length = 294.99  (Core Airframe Length (in))
  Design_Inputs:Nose Cone Length = 44.7  (Nose Cone Length (in))
  Design_Inputs:Nose Radius = 0.25  (Nose tip radus (in))
  Design_Inputs:Outer Diameter = 12.5  (Outside Diameter of the Airframe (in))

Parameter links (A drives B)
  UserParm:Design_Inputs:Outer Diameter -> FuselageGeom:XSec_0:Circle_Diameter Scale=0.0254
  UserParm:Design_Inputs:Outer Diameter -> FuselageGeom:XSec_1:Circle_Diameter Scale=0.0254
  UserParm:Design_Inputs:Outer Diameter -> FuselageGeom:XSec_2:Circle_Diameter Scale=0.0254
  UserParm:Design_Inputs:Outer Diameter -> FuselageGeom:XSec_3:Circle_Diameter Scale=0.0254
  UserParm:Design_Inputs:Nose Cone Length -> Nose Cone:Design:Length Scale=0.0254
  UserParm:Design_Inputs:Outer Diameter -> Nose Cone:XSec_1:Circle_Diameter Scale=0.0254
  UserParm:Design_Inputs:Nose Cone Length -> FuselageGeom:XForm:X_Location Scale=0.0254
  UserParm:Design_Inputs:Core Length -> FuselageGeom:Design:Length Scale=0.0254
  UserParm:Design_Inputs:Nose Radius -> Nose Cone:XSec_0:Circle_Diameter Scale=0.0127

VSPAERO settings: Sref=0.0729 bref=0.3048 cref=0.3048 Xcg=0 Ycg=0 Zcg=0 AlphaStart=1 AlphaEnd=2 AlphaNpts=5 BetaStart=0 BetaEnd=0 BetaNpts=1 MachStart=4.43 MachEnd=4 MachNpts=1 ReCref=1e+07 Vinf=100 Rho=0.002377
