OpenVSP model (file version 5), 3 components.
Geometry view with OpenVSP parameter names; values to 6 digits, angles in degrees, lengths in the model's unit.
Overall bounding box: X_Min=-0.00101135 X_Len=8.66618 Y_Min=-0.521092 Y_Len=1.04218 Z_Min=-0.301769 Z_Len=0.902558

Fuselage "FuselageGeom"
  location (X Y Z) 1.13538 0 0, rotation 0 0 0
  bounding box size 7.49275 0.3175 0.3175
  Design: Length=7.49275
  cross sections:
    n  XLocPercent  YLocPercent  ZLocPercent  shape
    0  0            0            0            circle Circle_Diameter=0.3175
    1  0.5          0            0            as above
    2  0.75         0            0            as above
    3  1            0            0            as above

Wing "Fins"
  location (X Y Z) 8.1 0 0.157, rotation 90 0 0
  3 copies around X
  bounding box size 0.565169 1.04218 0.902558
  totals: TotalSpan=0.887578 TotalProjectedSpan=0.887578 TotalChord=0.318135 TotalArea=0.282369 TotalAR=2.78994
  root: chord 0.443484, twist 0, edit curve Width=0.443484 Height=0.003175 AbsoluteFlag=0 SymType=0 linear points (X Y): 0.5 0, 0.48 -0.5, 0 -0.5, -0.48 -0.5, -0.5 0, -0.48 0.5, 0 0.5, 0.48 0.5, 0.5 0
  sections:
    n  Span      Root_Chord  Tip_Chord  Area      Sweep  Sweep_Location  Dihedral  Twist  Twist_Location  tip airfoil
    1  0.443789  0.443484    0.192786   0.141185  40     0               0         0      0.25            edit curve Width=0.192786 Height=0.003175 AbsoluteFlag=0 SymType=0 linear points (X Y): 0.5 0, 0.45 -0.5, 0 -0.5, -0.45 -0.5, -0.5 0, -0.45 0.5, 0 0.5, 0.45 0.5, 0.5 0

Fuselage "Nose Cone"
  location (X Y Z) 0 0 0, rotation 0 0 0
  bounding box size 1.13639 0.3175 0.3175
  Design: Length=1.13538
  cross sections:
    n  XLocPercent  YLocPercent  ZLocPercent  shape
    0  0            0            0            circle Circle_Diameter=0.003175
    1  1            0            0            circle Circle_Diameter=0.3175

User parameters
  Core:Core Length = 294.99  (Core Airframe Length (in))
  Core:Outer Diameter = 12.5  (Outside Diameter of the Airframe (in))
  Fins:Fin Root Chord = 17.46  (Fin Root Chord (in))
  Fins:Fin Span = 17.472  (Fin Span (in))
  Fins:Fin Sweep = 40  (Fin Sweep (deg))
  Fins:Fin Thickness = 0.125  (Fin Thickness (in))
  Fins:Fin Tip Chord = 7.59  (Fin Tip Chord (in))
  Nose:Nose Cone Length = 44.7  (Nose Cone Length (in))
  Nose:Nose Radius = 0.25  (Nose tip radus (in))

Parameter links (A drives B)
  UserParm:Core:Outer Diameter -> FuselageGeom:XSec_0:Circle_Diameter Scale=0.0254
  UserParm:Core:Outer Diameter -> FuselageGeom:XSec_1:Circle_Diameter Scale=0.0254
  UserParm:Core:Outer Diameter -> FuselageGeom:XSec_2:Circle_Diameter Scale=0.0254
  UserParm:Core:Outer Diameter -> FuselageGeom:XSec_3:Circle_Diameter Scale=0.0254
  UserParm:Nose:Nose Cone Length -> Nose Cone:Design:Length Scale=0.0254
  UserParm:Core:Outer Diameter -> Nose Cone:XSec_1:Circle_Diameter Scale=0.0254
  UserParm:Nose:Nose Cone Length -> FuselageGeom:XForm:X_Location Scale=0.0254
  UserParm:Core:Core Length -> FuselageGeom:Design:Length Scale=0.0254
  UserParm:Nose:Nose Radius -> Nose Cone:XSec_0:Circle_Diameter Scale=0.0127
  UserParm:Fins:Fin Span -> Fins:XSec_1:Span Scale=0.0254
  UserParm:Fins:Fin Root Chord -> Fins:XSec_1:Root_Chord Scale=0.0254
  UserParm:Fins:Fin Tip Chord -> Fins:XSec_1:Tip_Chord Scale=0.0254
  UserParm:Fins:Fin Sweep -> Fins:XSec_1:Sweep
  UserParm:Fins:Fin Thickness -> Fins:XSec_1:Height Scale=0.0254
  UserParm:Fins:Fin Thickness -> Fins:XSec_0:Height Scale=0.0254

VSPAERO settings: Sref=0.0729 bref=0.3048 cref=0.3048 Xcg=0 Ycg=0 Zcg=0 AlphaStart=1 AlphaEnd=2 AlphaNpts=5 BetaStart=0 BetaEnd=0 BetaNpts=1 MachStart=4.43 MachEnd=4 MachNpts=1 ReCref=1e+07 Vinf=100 Rho=0.002377
