OpenVSP model (file version 5), 2 components.
Geometry view with OpenVSP parameter names; values to 6 digits, angles in degrees, lengths in the model's unit.
Overall bounding box: X_Min=0 X_Len=4.6 Y_Min=-0.436763 Y_Len=0.873525 Z_Min=-0.256495 Z_Len=0.756495

Fuselage "FuselageGeom"
  location (X Y Z) 0 0 0, rotation 0 0 0
  bounding box size 4.6 0.3048 0.3048
  Design: Length=4.6
  cross sections:
    n  XLocPercent  YLocPercent  ZLocPercent  shape
    0  0            0            0            point
    1  0.25         0            0            circle Circle_Diameter=0.3048
    2  0.5          0            0            as above
    3  0.75         0            0            as above
    4  1            0            0            as above

Wing "Fins"
  location (X Y Z) 3.8 0 0.1, rotation 90 0 0
  3 copies around X
  bounding box size 0.7 0.873525 0.756495
  totals: TotalSpan=0.8 TotalProjectedSpan=0.8 TotalChord=0.5 TotalArea=0.4 TotalAR=1.6
  root: chord 0.7, twist 0, edit curve Width=0.7 Height=0.035 AbsoluteFlag=0 SymType=1 linear points (X Y): 0.5 0, 0.4 -0.5, 0 -0.5, -0.4 -0.5, -0.5 0, -0.4 0.5, 0 0.5, 0.4 0.5, 0.5 0
  sections:
    n  Span  Root_Chord  Tip_Chord  Area  Sweep  Sweep_Location  Dihedral  Twist  Twist_Location  tip airfoil
    1  0.4   0.7         0.3        0.2   26     0               0         0      0.25            edit curve Width=0.3 Height=0.015 AbsoluteFlag=0 SymType=1 linear points (X Y): 0.5 0, 0.4 -0.5, 0 -0.5, -0.4 -0.5, -0.5 0, -0.4 0.5, 0 0.5, 0.4 0.5, 0.5 0

VSPAERO settings: Sref=0.0729 bref=0.3048 cref=0.3048 Xcg=0 Ycg=0 Zcg=0 AlphaStart=1 AlphaEnd=2 AlphaNpts=5 BetaStart=0 BetaEnd=0 BetaNpts=1 MachStart=4.43 MachEnd=4 MachNpts=1 ReCref=1e+07 Vinf=100 Rho=0.002377
